! ======================================================================
! Alocação Estocástica de Veículos Elétricos (OpenDSS)
! Métrica: Quantidade fixa (50 VEs)
! Quantidade de VEs: 50
! Semente (Seed): 42
! Total de Domicílios BT: 1619
! Total de Barras BT com Cargas: 1143
! Total de Barras do Alimentador: 2586
! ======================================================================

New Load.EV_MS22-1_semana_2_7p2kW_1 Bus1=154652959tr.1.4 Phases=1 Conn=Wye kV=0.220 kW=7.2 pf=1.0 status=variable
New Load.EV_Share-3_semana_1_7p2kW_2 Bus1=3860569938475554.3.4 Phases=1 Conn=Wye kV=0.220 kW=7.2 pf=1.0 status=variable
New Load.EV_AsO6-1_semana_3_7p2kW_3 Bus1=3876811438461514.2.4 Phases=1 Conn=Wye kV=0.220 kW=7.2 pf=1.0 status=variable
New Load.EV_AsO10-3_semana_1_3p6kW_4 Bus1=3858832838458851.2.4 Phases=1 Conn=Wye kV=0.220 kW=3.6 pf=1.0 status=variable
New Load.EV_Share-15_semana_2_7p2kW_5 Bus1=3859027538460939.3.4 Phases=1 Conn=Wye kV=0.220 kW=7.2 pf=1.0 status=variable
New Load.EV_Bl2-5_semana_1_3p6kW_6 Bus1=3860492038466710.3.4 Phases=1 Conn=Wye kV=0.220 kW=3.6 pf=1.0 status=variable
New Load.EV_AdO3-3_semana_3_7p2kW_7 Bus1=3860858638474221.1.4 Phases=1 Conn=Wye kV=0.220 kW=7.2 pf=1.0 status=variable
New Load.EV_Bl2-7_semana_2_3p6kW_8 Bus1=3858591038464492.2.4 Phases=1 Conn=Wye kV=0.220 kW=3.6 pf=1.0 status=variable
New Load.EV_AsO10-3_semana_1_3p6kW_9 Bus1=3860389438461006.2.4 Phases=1 Conn=Wye kV=0.220 kW=3.6 pf=1.0 status=variable
New Load.EV_AsO2-1_semana_1_7p2kW_10 Bus1=3881501638455545.3.4 Phases=1 Conn=Wye kV=0.220 kW=7.2 pf=1.0 status=variable
New Load.EV_SR14-1_semana_2_3p6kW_11 Bus1=3859887138470135.2.4 Phases=1 Conn=Wye kV=0.220 kW=3.6 pf=1.0 status=variable
New Load.EV_Share-15_semana_3_3p6kW_12 Bus1=3857743838462634.2.4 Phases=1 Conn=Wye kV=0.220 kW=3.6 pf=1.0 status=variable
New Load.EV_Share-15_semana_4_7p2kW_13 Bus1=3880828338455090.1.4 Phases=1 Conn=Wye kV=0.220 kW=7.2 pf=1.0 status=variable
New Load.EV_Bl2-6_semana_1_7p2kW_14 Bus1=3871326638465758.3.4 Phases=1 Conn=Wye kV=0.220 kW=7.2 pf=1.0 status=variable
New Load.EV_MS22-1_semana_3_3p6kW_15 Bus1=3881563338455580.3.4 Phases=1 Conn=Wye kV=0.220 kW=3.6 pf=1.0 status=variable
New Load.EV_AdO3-3_semana_4_3p6kW_16 Bus1=3873137338463955.3.4 Phases=1 Conn=Wye kV=0.220 kW=3.6 pf=1.0 status=variable
New Load.EV_Share-8_semana_4_7p2kW_17 Bus1=3863388038458087.1.4 Phases=1 Conn=Wye kV=0.220 kW=7.2 pf=1.0 status=variable
New Load.EV_Bl2-3_semana_1_7p2kW_18 Bus1=3877073338462431.2.4 Phases=1 Conn=Wye kV=0.220 kW=7.2 pf=1.0 status=variable
New Load.EV_Share-20_semana_2_3p6kW_19 Bus1=3857980038462787.2.4 Phases=1 Conn=Wye kV=0.220 kW=3.6 pf=1.0 status=variable
New Load.EV_UT15-2_semana_3_7p2kW_20 Bus1=3858565438467125.1.4 Phases=1 Conn=Wye kV=0.220 kW=7.2 pf=1.0 status=variable
New Load.EV_SR2-3_semana_2_3p6kW_21 Bus1=3863897638458944.1.4 Phases=1 Conn=Wye kV=0.220 kW=3.6 pf=1.0 status=variable
New Load.EV_Bl2-7_semana_2_7p2kW_22 Bus1=3856780038463934.1.4 Phases=1 Conn=Wye kV=0.220 kW=7.2 pf=1.0 status=variable
New Load.EV_SR2-1_semana_3_7p2kW_23 Bus1=3862124538458846.2.4 Phases=1 Conn=Wye kV=0.220 kW=7.2 pf=1.0 status=variable
New Load.EV_MS22-1_semana_3_7p2kW_24 Bus1=3859890438473835.1.4 Phases=1 Conn=Wye kV=0.220 kW=7.2 pf=1.0 status=variable
New Load.EV_Bl2-6_semana_2_3p6kW_25 Bus1=3881563338455580.1.4 Phases=1 Conn=Wye kV=0.220 kW=3.6 pf=1.0 status=variable
New Load.EV_Bl2-6_semana_2_3p6kW_26 Bus1=3869963538466317.3.4 Phases=1 Conn=Wye kV=0.220 kW=3.6 pf=1.0 status=variable
New Load.EV_Share-6_semana_1_7p2kW_27 Bus1=3872880438464885.2.4 Phases=1 Conn=Wye kV=0.220 kW=7.2 pf=1.0 status=variable
New Load.EV_Share-3_semana_1_3p6kW_28 Bus1=270820859.1.4 Phases=1 Conn=Wye kV=0.220 kW=3.6 pf=1.0 status=variable
New Load.EV_MS22-1_semana_2_7p2kW_29 Bus1=3861915938457792.2.4 Phases=1 Conn=Wye kV=0.220 kW=7.2 pf=1.0 status=variable
New Load.EV_Bl7-1_semana_1_3p6kW_30 Bus1=3881256638454870.1.4 Phases=1 Conn=Wye kV=0.220 kW=3.6 pf=1.0 status=variable
New Load.EV_Share-30_semana_1_7p2kW_31 Bus1=3857485038467906.3.4 Phases=1 Conn=Wye kV=0.220 kW=7.2 pf=1.0 status=variable
New Load.EV_Share-25_semana_2_3p6kW_32 Bus1=3860313638465320.1.4 Phases=1 Conn=Wye kV=0.220 kW=3.6 pf=1.0 status=variable
New Load.EV_Bl2-6_semana_4_3p6kW_33 Bus1=3880461638456965.3.4 Phases=1 Conn=Wye kV=0.220 kW=3.6 pf=1.0 status=variable
New Load.EV_Share-7_semana_2_3p6kW_34 Bus1=3881659938455332.1.4 Phases=1 Conn=Wye kV=0.220 kW=3.6 pf=1.0 status=variable
New Load.EV_AsO10-5_semana_1_3p6kW_35 Bus1=271134053.3.4 Phases=1 Conn=Wye kV=0.220 kW=3.6 pf=1.0 status=variable
New Load.EV_AsO2-1_semana_4_3p6kW_36 Bus1=3863067138457505.2.4 Phases=1 Conn=Wye kV=0.220 kW=3.6 pf=1.0 status=variable
New Load.EV_Bl2-2_semana_4_7p2kW_37 Bus1=3877063138461253.1.4 Phases=1 Conn=Wye kV=0.220 kW=7.2 pf=1.0 status=variable
New Load.EV_AdO3-3_semana_2_3p6kW_38 Bus1=3861846938461041.2.4 Phases=1 Conn=Wye kV=0.220 kW=3.6 pf=1.0 status=variable
New Load.EV_Share-20_semana_2_7p2kW_39 Bus1=3857004738459696.3.4 Phases=1 Conn=Wye kV=0.220 kW=7.2 pf=1.0 status=variable
New Load.EV_Share-3_semana_3_7p2kW_40 Bus1=3879980138459878.3.4 Phases=1 Conn=Wye kV=0.220 kW=7.2 pf=1.0 status=variable
New Load.EV_MS1-1_semana_1_3p6kW_41 Bus1=3873399938464342.3.4 Phases=1 Conn=Wye kV=0.220 kW=3.6 pf=1.0 status=variable
New Load.EV_AsO6-1_semana_1_3p6kW_42 Bus1=3881437138456159.1.4 Phases=1 Conn=Wye kV=0.220 kW=3.6 pf=1.0 status=variable
New Load.EV_Share-12_semana_2_3p6kW_43 Bus1=3872445438465395.2.4 Phases=1 Conn=Wye kV=0.220 kW=3.6 pf=1.0 status=variable
New Load.EV_SR14-2_semana_2_3p6kW_44 Bus1=3859494538460040.2.4 Phases=1 Conn=Wye kV=0.220 kW=3.6 pf=1.0 status=variable
New Load.EV_Bl2-2_semana_4_3p6kW_45 Bus1=3857305038467962.2.4 Phases=1 Conn=Wye kV=0.220 kW=3.6 pf=1.0 status=variable
New Load.EV_AdO1-1_semana_1_7p2kW_46 Bus1=3860191938464242.1.4 Phases=1 Conn=Wye kV=0.220 kW=7.2 pf=1.0 status=variable
New Load.EV_Share-6_semana_2_3p6kW_47 Bus1=3881437138456177.1.4 Phases=1 Conn=Wye kV=0.220 kW=3.6 pf=1.0 status=variable
New Load.EV_Share-7_semana_1_7p2kW_48 Bus1=154652959tr.1.4 Phases=1 Conn=Wye kV=0.220 kW=7.2 pf=1.0 status=variable
New Load.EV_SR14-2_semana_3_3p6kW_49 Bus1=3872062138465964.3.4 Phases=1 Conn=Wye kV=0.220 kW=3.6 pf=1.0 status=variable
New Load.EV_Share-7_semana_1_7p2kW_50 Bus1=3875352238463364.3.4 Phases=1 Conn=Wye kV=0.220 kW=7.2 pf=1.0 status=variable
